// SBML level 1 version 1
// Copyright (C) 2010 - 2013 by Pedro Mendes, Virginia Tech Intellectual
// Properties, Inc., University of Heidelberg, and The University
// of Manchester.
// All rights reserved.
// Copyright (C) 2008 - 2009 by Pedro Mendes, Virginia Tech Intellectual
// Properties, Inc., EML Research, gGmbH, University of Heidelberg,
// and The University of Manchester.
// All rights reserved.
// Copyright (C) 2004 - 2007 by Pedro Mendes, Virginia Tech Intellectual
// Properties, Inc. and EML Research, gGmbH.
// All rights reserved.

model repressilator()
  // Repressilator: A synthetic oscillatory network of transcriptional regulators
  // Citation
  // Elowitz MB, Leibler S (2000) A synthetic oscillatory network of transcriptional regulators.Nature.403 : 335 - 338. http:// www.nature.com/cgi-taf/DynaPage.taf?file=/nature/journal/v403/n6767/full/ 403335a0_fs.html
  // Description
  // This file describes the repressilator system. The authors of this model ( see reference) use three transcriptional repressor systems that are not part of any natural biological clock to build an oscillating network that they called the repressilator. The model system was induced in Escherichia coli.In this system, LacI (variable X is the mRNA, variable PX is the protein) inhibits the tetracycline- resistance transposon tetR (Y, PY describe mRNA and protein) . Protein tetR inhibits the gene Cl from phage Lambda ( Z, PZ: mRNA, protein), and protein Cl inhibits lacI expression. With appropriate parameter values this system oscillates.
  // Rate constant Reaction
  // k1 = 1 X -> EmptySet
  // k1 = 1 Y -> EmptySet
  // k1 = 1 Z -> EmptySet
  // K = 1 (hill khalf) PX |-> Y
  // K = 1 (hill khalf) PY |-> Z
  // K = 1 (hill khalf) PZ |-> X
  // n = 2.1 (hill nhill) PX |-> Y
  // n = 2.1 (hill nhill) PY |-> Z
  // n = 2.1 (hill nhill) PZ |-> X
  // {alpha0, alpha} = {0, 250} (hill basalRate) PX |-> Y
  // {alpha0, alpha} = {0, 250} (hill basalRate) PY |-> Z
  // {alpha0, alpha} = {0, 250} (hill basalRate) PZ |-> X
  // alpha1 = 0 (hill vmax) PX |-> Y
  // alpha1 = 0 (hill vmax) PY |-> Z
  // alpha1 = 0 (hill vmax) PZ |-> X
  // beta = 5 PX -> EmptySet
  // beta = 5 PY -> EmptySet
  // beta = 5 PZ -> EmptySet
  // beta = 5 X + EmptySet -> PX + X
  // beta = 5 Y + EmptySet -> PY + Y
  // beta = 5 Z + EmptySet -> PZ + Z
  // Variable IC ODE
  // PX 5 PX'[t] == -(beta*PX[t]) + beta*X[t]
  // PY 0 PY'[t] == -(beta*PY[t]) + beta*Y[t]
  // PZ 15 PZ'[t] == -(beta*PZ[t]) + beta*Z[t]
  // X 0 X'[t] == alpha0 + (alpha + alpha1*PZ[t]^n)/(K^n + PZ[t]^n) - k1*X[t]
  // Y 0 Y'[t] == alpha0 + (alpha + alpha1*PX[t]^n)/(K^n + PX[t]^n) - k1*Y[t]
  // Z 0 Z'[t] == alpha0 + (alpha + alpha1*PY[t]^n)/(K^n + PY[t]^n) - k1*Z[t]
  // Generated by Cellerator Version 1.0 update 2.1127 using Mathematica 4.2 for Mac OS X (June 4, 2002), November 27, 2002 12:15:32, using (PowerMac,PowerPC, Mac OS X,MacOSX,Darwin)
  // author=B.E.Shapiro

  // Compartments:
  compartment cell;

  // Species:
  species $EmptySet in cell = 0;
  species PX in cell = 5/cell;
  species PY in cell = 0;
  species PZ in cell = 15/cell;
  species X in cell = 0;
  species Y in cell = 0;
  species Z in cell = 0;

  // Reactions:
  Reaction1: X => $EmptySet; Reaction1_k1*X;
    Reaction1_k1 = 1;
  Reaction2: Y => $EmptySet; Reaction2_k1*Y;
    Reaction2_k1 = 1;
  Reaction3: Z => $EmptySet; Reaction3_k1*Z;
    Reaction3_k1 = 1;
  Reaction4: $EmptySet + X => PX + X; X*Reaction4_beta;
    Reaction4_beta = 5;
  Reaction5: $EmptySet + Y => PY + Y; Y*Reaction5_beta;
    Reaction5_beta = 5;
  Reaction6: $EmptySet + Z => PZ + Z; Z*Reaction6_beta;
    Reaction6_beta = 5;
  Reaction7: PX => $EmptySet; PX*Reaction7_beta;
    Reaction7_beta = 5;
  Reaction8: PY => $EmptySet; PY*Reaction8_beta;
    Reaction8_beta = 5;
  Reaction9: PZ => $EmptySet; PZ*Reaction9_beta;
    Reaction9_beta = 5;
  Reaction10: $EmptySet => X; Reaction10_alpha0 + (Reaction10_alpha + PZ^Reaction10_n*Reaction10_alpha1)/(Reaction10_K^Reaction10_n + PZ^Reaction10_n);
    Reaction10_alpha1 = 0; Reaction10_n = 2.1; Reaction10_K = 1; Reaction10_alpha0 = 0; Reaction10_alpha = 250;
  Reaction11: $EmptySet => Y; Reaction11_alpha0 + (Reaction11_alpha + PX^Reaction11_n*Reaction11_alpha1)/(Reaction11_K^Reaction11_n + PX^Reaction11_n);
    Reaction11_alpha1 = 0; Reaction11_n = 2.1; Reaction11_K = 1; Reaction11_alpha0 = 0; Reaction11_alpha = 250;
  Reaction12: $EmptySet => Z; Reaction12_alpha0 + (Reaction12_alpha + PY^Reaction12_n*Reaction12_alpha1)/(Reaction12_K^Reaction12_n + PY^Reaction12_n);
    Reaction12_alpha1 = 0; Reaction12_n = 2.1; Reaction12_K = 1; Reaction12_alpha0 = 0; Reaction12_alpha = 250;
end
