// SBML level 2 version 1

function function_0(substrate, Inhibitor, V, Ks, n, L, Ki)
  V*substrate*(Ks + substrate)^(n - 1)/(L*(Ks*(1 + Inhibitor/Ki))^n + (Ks + substrate)^n);
end

model Model_1()
  // New Model

  // Compartments:
  compartment compartment_0 = 1;

  // Species:
  species P1 in compartment_0 = 0.09999998;
  species S1 in compartment_0 = 0.09999998;
  species P2 in compartment_0 = 0.09999998;
  species S2 in compartment_0 = 0.09999998;
  species P3 in compartment_0 = 0.09999998;
  species S3 in compartment_0 = 0.09999998;
  species P4 in compartment_0 = 0.09999998;
  species S4 in compartment_0 = 0.09999998;
  species P5 in compartment_0 = 0.09999998;
  species S5 in compartment_0 = 0.09999998;
  species P6 in compartment_0 = 0.09999998;
  species S6 in compartment_0 = 0.09999998;
  species P10 in compartment_0 = 0.09999998;
  species S10 in compartment_0 = 0.09999998;
  species P11 in compartment_0 = 0.09999998;
  species S11 in compartment_0 = 0.09999998;
  species P12 in compartment_0 = 0.09999998;
  species S12 in compartment_0 = 0.09999998;
  species P13 in compartment_0 = 0.09999998;
  species S13 in compartment_0 = 0.09999998;
  species P14 in compartment_0 = 0.09999998;
  species S14 in compartment_0 = 0.09999998;
  species P15 in compartment_0 = 0.09999998;
  species S15 in compartment_0 = 0.09999998;
  species P16 in compartment_0 = 0.09999998;
  species S16 in compartment_0 = 0.09999998;
  species P18 in compartment_0 = 0.09999998;
  species S18 in compartment_0 = 0.09999998;
  species P19 in compartment_0 = 0.09999998;
  species S19 in compartment_0 = 0.09999998;
  species P20 in compartment_0 = 0.09999998;
  species S20 in compartment_0 = 0.09999998;
  species P21 in compartment_0 = 0.09999998;
  species P22 in compartment_0 = 0.09999998;
  species S22 in compartment_0 = 0.09999998;
  species P23 in compartment_0 = 0.09999998;
  species S23 in compartment_0 = 0.09999998;
  species P27 in compartment_0 = 0.09999998;
  species S27 in compartment_0 = 0.09999998;
  species P28 in compartment_0 = 0.09999998;
  species S28 in compartment_0 = 0.09999998;
  species P29 in compartment_0 = 0.09999998;
  species S29 in compartment_0 = 0.09999998;
  species P30 in compartment_0 = 0.09999998;
  species P31 in compartment_0 = 0.09999998;
  species S30 in compartment_0 = 0.09999998;
  species S31 in compartment_0 = 0.09999998;
  species P32 in compartment_0 = 0.09999998;
  species S32 in compartment_0 = 0.09999998;
  species S33 in compartment_0 = 0.09999998;
  species P34 in compartment_0 = 0.09999998;
  species P35 in compartment_0 = 0.09999998;
  species S34 in compartment_0 = 0.09999998;
  species P36 in compartment_0 = 0.09999998;
  species P37 in compartment_0 = 0.09999998;
  species S36 in compartment_0 = 0.09999998;
  species S37 in compartment_0 = 0.09999998;
  species P38 in compartment_0 = 0.09999998;
  species S38 in compartment_0 = 0.09999998;
  species P39 in compartment_0 = 0.09999998;
  species S39 in compartment_0 = 0.09999998;
  species P41 in compartment_0 = 0.09999998;
  species S41 in compartment_0 = 0.09999998;
  species P42 in compartment_0 = 0.09999998;
  species S42 in compartment_0 = 0.09999998;
  species P43 in compartment_0 = 0.09999998;
  species S43 in compartment_0 = 0.09999998;
  species P44 in compartment_0 = 0.09999998;
  species S44 in compartment_0 = 0.09999998;
  species P45 in compartment_0 = 0.09999998;
  species S45 in compartment_0 = 0.09999998;
  species P46 in compartment_0 = 0.09999998;
  species S46 in compartment_0 = 0.09999998;
  species P7 in compartment_0 = 0.09999998;
  species A1 in compartment_0 = 0.09999998;
  species A2 in compartment_0 = 0.09999998;
  species A3 in compartment_0 = 0.09999998;
  species B1 in compartment_0 = 0.09999998;
  species C1 in compartment_0 = 0.09999998;
  species C2 in compartment_0 = 0.09999998;
  species D1 in compartment_0 = 0.09999998;
  species D2 in compartment_0 = 0.09999998;
  species D3 in compartment_0 = 0.09999998;
  species P17 in compartment_0 = 0.09999998;
  species $M1 in compartment_0 = 0.09999998;
  species $M2 in compartment_0 = 0.09999998;
  species $M3 in compartment_0 = 0.09999998;
  species $M6 in compartment_0 = 0.09999998;
  species $M10 in compartment_0 = 0.09999998;
  species $M11 in compartment_0 = 0.09999998;
  species $M13 in compartment_0 = 0.09999998;
  species $M16 in compartment_0 = 0.09999998;
  species $M18 in compartment_0 = 0.09999998;
  species $M19 in compartment_0 = 0.09999998;
  species $M20 in compartment_0 = 0.09999998;
  species $M22 in compartment_0 = 0.09999998;
  species $M27 in compartment_0 = 0.09999998;
  species $M28 in compartment_0 = 0.09999998;
  species $M29 in compartment_0 = 0.09999998;
  species $M38 in compartment_0 = 0.09999998;
  species $species_100 in compartment_0 = 0.09999998; species_100 is ",";
  species $M39 in compartment_0 = 0.09999998;
  species $M40 in compartment_0 = 0.09999998;
  species $M42 in compartment_0 = 0.09999998;
  species $M45 in compartment_0 = 0.09999998;

  // Parameters:
  K1 = 1;
  K2 = 2;
  K3 = 3;
  K4 = 4;
  K5 = 5;
  K6 = 6;
  K7 = 7;
  K8 = 8;
  K9 = 9;
  K10 = 10;

  // Reactions:
  reaction_0: S1 => P1; compartment_0*function_0(S1, M1, K1, K2, K3, K4, K5);  // modifiers: M1
  reaction_1: S2 => P2; compartment_0*function_0(S2, M2, K1, K2, K3);  // modifiers: M2
  reaction_2: S3 => P3; compartment_0*function_0(S3, M3, K4, K6, K8);  // modifiers: M3
  reaction_3: S4 => P4; compartment_0*function_0(S4, K1, K5);
  reaction_4: S5 => P5; compartment_0*function_0(S5, K5, K5, K5);
  reaction_5: S6 => P6; compartment_0*function_0(S6, M6, K1, K2, K3, K4, K5);  // modifiers: M6
  reaction_6: => P7; compartment_0*function_0(K6);
  reaction_7: S10 => P10; compartment_0*function_0(S10, M10, K7, K7, K7, K7);  // modifiers: M10
  reaction_8: S11 => P11; compartment_0*function_0(S11, M11, K8, K8, K8, K8);  // modifiers: M11
  reaction_9: S12 => P12; compartment_0*function_0(S12, M2, K9, K9, K9);  // modifiers: M2
  reaction_10: S13 => P13; compartment_0*function_0(S13, M13, K10, K9, K8);  // modifiers: M13
  reaction_11: S14 => P14; compartment_0*function_0(S14, K10, K9, K8);
  reaction_12: S15 => P15; compartment_0*function_0(S15, K3, K4, K5);
  reaction_13: S16 => P16; compartment_0*function_0(S16, M16, K5, K6, K7);  // modifiers: M16
  reaction_14: A1 + A2 + A3 => B1; compartment_0*ModelValue_10*A1*A2*A3;
  reaction_15: S18 -> P18; compartment_0*function_0(S18, P18, M18, K4, K3, K2, K1, K5, K6);  // modifiers: M18
  reaction_16: S19 -> P19; compartment_0*function_0(S19, P19, M19, K1, K3, K5, K7, K9);  // modifiers: M19
  reaction_17: S20 -> P20; compartment_0*function_0(S20, P20, M20, K2, K4, K6, K8, K10);  // modifiers: M20
  reaction_18: -> P21; compartment_0*function_0(K4);
  reaction_19: S22 -> P22; compartment_0*function_0(S22, P22, M22, K3, K4, K5, K6, K7, K8, K9);  // modifiers: M22
  reaction_20: S23 -> P23; compartment_0*function_0(S23, P23, K4, K6, K8, K10, K1);
  reaction_21: C1 + C2 -> D1 + D2 + D3; compartment_0*(ModelValue_10*C1*C2 - ModelValue_19*D1*D2*D3);
  reaction_22: S27 -> P27; compartment_0*function_0(S27, P27, M27, K3, K4, K5, K6, K7, K8);  // modifiers: M27
  reaction_23: S28 -> P28; compartment_0*function_0(S28, P28, M28, K3, K4, K5, K6, K7, K8);  // modifiers: M28
  reaction_24: S29 -> P29; compartment_0*function_0(S29, P29, M29, K1, K2, K3, K4, K5);  // modifiers: M29
  reaction_25: S30 + S31 -> P30 + P31; compartment_0*function_0(S30, S31, P30, P31, K1, K2, K3, K4, K5, K6, K7, K8, K9, K10);
  reaction_26: S32 + S33 -> P32; compartment_0*function_0(S32, S33, P32, K1, K2, K3, K4, K5, K6, K7);
  reaction_27: S34 -> P34 + P35; compartment_0*function_0(S34, P34, P35, K1, K2, K3, K4, K5, K6, K7);
  reaction_28: S36 + S37 -> P36 + P37; compartment_0*function_0(S36, S37, P36, P37, K1, K2, K3, K4, K5, K6, K7, K8, K9);
  reaction_29: S38 -> P38; compartment_0*function_0(S38, P38, M38, K1, K2, K3, K4, K5, K6, K7);  // modifiers: M38
  reaction_30: S39 -> P39; compartment_0*function_0(S39, P39, M39, M40, K1, K2, K3, K4, K5, K6, K7, K8, K9, K10);  // modifiers: M39, M40
  reaction_31: S41 -> P41; compartment_0*function_0(S41, P41, K1, K2, K3, K4, K5);
  reaction_32: S42 -> P42; compartment_0*function_0(S42, P42, K1, K2, K3, K4);
  reaction_33: S43 -> P43; compartment_0*function_0(S43, P43, M42, K10, K9, K8, K7, K6);  // modifiers: M42
  reaction_34: S44 -> P44; compartment_0*function_0(S44, P44, K1, K2, K3, K4, K5);
  reaction_35: S45 -> P45; compartment_0*function_0(S45, P45, M45, K1, K2, K3, K4, K5);  // modifiers: M45
  reaction_36: S46 -> P46; compartment_0*function_0(S46, P46, K1, K2, K3, K4);

  // Unit definitions:
  unit volume = 1e-3 litre;
  unit substance = 1e-3 mole;
end
